# OpenSim document version 40000
Model arm26:
  gravity: 0 -9.8066 0
  length_units: meters
  force_units: N
  credits:
    The OpenSim Development Team (Reinbolt, J; Seth, A; Habib, A; Hamner, S) adapted from a model originally created by Kate Holzbaur (11/22/04) License: Creative Commons (CCBY 3.0). You are free to distribute, remix, tweak, and build upon this work, even commercially, as long as you credit us for the original creation. http://creativecommons.org/licenses/by/3.0/
  publications:
    Holzbaur, K.R.S., Murray, W.M., Delp, S.L. A Model of the Upper Extremity for Simulating Musculoskeletal Surgery and Analyzing Neuromuscular Control. Annals of Biomedical Engineering, vol 33, pp 829–840, 2005
  Ground
  BodySet:
    Body base: mass=30 [kg] mass_center=(0 -0.16 0) inertia=(1.4745 0.7555 1.4314 0 0 0)
        meshes=(ground_ribs.vtp ground_spine.vtp ground_skull.vtp ground_jaw.vtp)
      WrapCylinder TRIlongglen: xyz_body_rotation=(1.37532 -0.294612 2.43596) translation=(-0.043905 -0.0039 0.1478)
          quadrant=x radius=0.003 length=0.03
    Body r_clavicle: mass=0.156 mass_center=(-0.011096 0.0063723 0.054168)
        inertia=(0.00024259 0.00025526 4.442e-5 -1.898e-5 -6.994e-5 5.371e-5) meshes=ground_r_clavicle.vtp
    Body r_scapula: mass=0.70396 mass_center=(-0.054694 -0.035032 -0.043734)
        inertia=(0.0012429 0.0011504 0.0013651 0.0004494 0.00040922 0.0002411) meshes=ground_r_scapula.vtp
    Body r_humerus: mass=1.864572 mass_center=(0 -0.180496 0) inertia=(0.01481 0.004551 0.013193 0 0 0)
        meshes=arm_r_humerus.vtp
      WrapEllipsoid TRIlonghh: xyz_body_rotation=(3.00162 -0.853466 2.57419) translation=(-0.0078 -0.0041 -0.0014)
          quadrant=z dimensions=(0.035 0.02 0.02)
      WrapEllipsoid BIClonghh: xyz_body_rotation=(-2.00434 -1.00164 0.975465) translation=(0.0033 0.0073 0.0003)
          quadrant=-y dimensions=(0.025 0.02 0.02)
      WrapCylinder TRI: xyz_body_rotation=(-0.14015 -0.00628319 0.154985) translation=(0.0028 -0.2919 -0.0069)
          quadrant=all radius=0.016 length=0.05
    Body r_ulna_radius: mass=1 mass_center=(-0.01 -0.14 0.04) inertia=(0.019281 0.001571 0.020062 0 0 0)
        meshes=(arm_r_ulna.vtp arm_r_radius.vtp)
    Body r_hand: mass=0.54 mass_center=(-0.00301314 -0.0424993 -0.00112205) inertia=(0.00011 6e-5 0.00015 0 0 0)
        meshes=(lunate.vtp sdfastSCAPHOIDw.vtp sdfastPISIFORMw.vtp sdfastTRIQUETRALw.vtp sdfast_1seg_hand_fr_c_5mc.vtp sdfast_1seg_hand_fr_c_4mc.vtp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)
  JointSet:
    WeldJoint offset: socket_parent_frame=ground_offset socket_child_frame=base_offset
      PhysicalOffsetFrame ground_offset: socket_parent=/ground translation=(0 0.8 0) [meters]
      PhysicalOffsetFrame base_offset: socket_parent=/bodyset/base translation=(0 0 0)
    WeldJoint r_sternoclavicular: socket_parent_frame=base_offset socket_child_frame=r_clavicle_offset
      PhysicalOffsetFrame base_offset: socket_parent=/bodyset/base translation=(0 0 0)
      PhysicalOffsetFrame r_clavicle_offset: socket_parent=/bodyset/r_clavicle translation=(0 0 0)
    WeldJoint r_acromioclavicular: socket_parent_frame=r_clavicle_offset socket_child_frame=r_scapula_offset
      PhysicalOffsetFrame r_clavicle_offset: socket_parent=/bodyset/base translation=(0 0 0)
      PhysicalOffsetFrame r_scapula_offset: socket_parent=/bodyset/r_scapula translation=(0 0 0)
    CustomJoint r_shoulder: socket_parent_frame=base_offset socket_child_frame=r_humerus_offset
      Coordinate r_shoulder_elev: default_value=0 range=(-1 3.14) clamped=true locked=true
      PhysicalOffsetFrame base_offset: socket_parent=/bodyset/base translation=(-0.017545 -0.007 0.17)
      PhysicalOffsetFrame r_humerus_offset: socket_parent=/bodyset/r_humerus translation=(0 0 0)
      SpatialTransform: axes_held_at_zero=(rotation2 rotation3 translation1 translation2 translation3)
        TransformAxis rotation1: coordinates=r_shoulder_elev axis=(-0.05889802 0.0023 0.9982614)
            LinearFunction(coefficients=1 0)
    CustomJoint r_elbow: socket_parent_frame=r_humerus_offset socket_child_frame=r_ulna_radius_offset
      Coordinate r_elbow_flexion: default_value=0.25 range=(0 2.5) clamped=true
      PhysicalOffsetFrame r_humerus_offset: socket_parent=/bodyset/r_humerus translation=(0.0061 -0.2904 -0.0123)
      PhysicalOffsetFrame r_ulna_radius_offset: socket_parent=/bodyset/r_ulna_radius translation=(0 0 0)
      SpatialTransform: axes_held_at_zero=(rotation2 rotation3 translation1 translation2 translation3)
        TransformAxis rotation1: coordinates=r_elbow_flexion axis=(0.04940001 0.03660001 0.9981083)
            LinearFunction(coefficients=1 0)
    WeldJoint r_radiocarpal: socket_parent_frame=r_ulna_radius_offset socket_child_frame=r_hand_offset
      PhysicalOffsetFrame r_ulna_radius_offset: socket_parent=/bodyset/r_ulna_radius translation=(0.009 -0.256 0.0622)
      PhysicalOffsetFrame r_hand_offset: socket_parent=/bodyset/r_hand translation=(0 0 0)
          orientation=(-2.83049 1.57 2.74159) [radians]
  ForceSet:
    Millard2012EquilibriumMuscle [values shared by the 6 below unless stated]: optimal_force=1
        max_contraction_velocity=10 ignore_tendon_compliance=true fiber_damping=0.1
        activation_time_constant=0.01 [seconds] deactivation_time_constant=0.04 [seconds] minimum_activation=0.01
      ActiveForceLengthCurve: minimum_value=0
      ForceVelocityCurve: concentric_slope_at_vmax=0 concentric_slope_near_vmax=0.25 isometric_slope=5
          eccentric_slope_at_vmax=0 eccentric_slope_near_vmax=0.15 max_eccentric_velocity_force_multiplier=1.4
      FiberForceLengthCurve
      TendonForceLengthCurve
    Millard2012EquilibriumMuscle TRIlong: max_isometric_force=798.52 optimal_fiber_length=0.134
        tendon_slack_length=0.143 pennation_angle_at_optimal=0.2094395 [radians]
      PathPoint P1: base (-0.05365 -0.01373 0.14723)
      PathPoint P2: r_humerus (-0.02714 -0.11441 -0.00664)
      PathPoint P3: r_humerus (-0.03184 -0.22637 -0.01217)
      PathPoint P4: r_humerus (-0.01743 -0.26757 -0.01208)
      PathPoint P5: r_ulna_radius (-0.0219 0.01046 -0.00078)
      PathWrap TRIlong-wrap-cylinder1: wrap_object=TRI method=hybrid
      PathWrap TRIlong-wrap-ellipsoid: wrap_object=TRIlonghh method=hybrid
      PathWrap TRIlong-wrap-cylinder2: wrap_object=TRIlongglen method=hybrid
    Millard2012EquilibriumMuscle TRIlat: max_isometric_force=624.3 optimal_fiber_length=0.1138
        tendon_slack_length=0.098 pennation_angle_at_optimal=0.1570796
      PathPoint P1: r_humerus (-0.00599 -0.12646 0.00428)
      PathPoint P2: r_humerus (-0.02344 -0.14528 0.00928)
      PathPoint P3: r_humerus (-0.03184 -0.22637 -0.01217)
      PathPoint P4: r_humerus (-0.01743 -0.26757 -0.01208)
      PathPoint P5: r_ulna_radius (-0.0219 0.01046 -0.00078)
      PathWrap: wrap_object=TRI method=hybrid
    Millard2012EquilibriumMuscle TRImed: max_isometric_force=624.3 optimal_fiber_length=0.1138
        tendon_slack_length=0.0908 pennation_angle_at_optimal=0.1570796
      PathPoint P1: r_humerus (-0.00838 -0.13695 -0.00906)
      PathPoint P2: r_humerus (-0.02601 -0.15139 -0.0108)
      PathPoint P3: r_humerus (-0.03184 -0.22637 -0.01217)
      PathPoint P4: r_humerus (-0.01743 -0.26757 -0.01208)
      PathPoint P5: r_ulna_radius (-0.0219 0.01046 -0.00078)
      PathWrap: wrap_object=TRI method=hybrid
    Millard2012EquilibriumMuscle BIClong: max_isometric_force=624.3 optimal_fiber_length=0.1157
        tendon_slack_length=0.2723 pennation_angle_at_optimal=0
      PathPoint P1: base (-0.039235 0.00347 0.14795)
      PathPoint P2: base (-0.028945 0.01391 0.15639)
      PathPoint P3: r_humerus (0.02131 0.01793 0.01028)
      PathPoint P4: r_humerus (0.02378 -0.00511 0.01201)
      PathPoint P5: r_humerus (0.01345 -0.02827 0.00136)
      PathPoint P6: r_humerus (0.01068 -0.07736 -0.00165)
      PathPoint P7: r_humerus (0.01703 -0.12125 0.00024)
      PathPoint P8: r_humerus (0.0228 -0.1754 -0.0063)
      PathPoint P9: r_ulna_radius (0.00751 -0.04839 0.02179)
      PathWrap: wrap_object=BIClonghh method=hybrid range=(2 3)
    Millard2012EquilibriumMuscle BICshort: max_isometric_force=435.56 optimal_fiber_length=0.1321
        tendon_slack_length=0.1923 pennation_angle_at_optimal=0
      PathPoint P1: base (0.004675 -0.01231 0.13475)
      PathPoint P2: base (-0.007075 -0.04004 0.14507)
      PathPoint P3: r_humerus (0.01117 -0.07576 -0.01101)
      PathPoint P4: r_humerus (0.01703 -0.12125 -0.01079)
      PathPoint P5: r_humerus (0.0228 -0.1754 -0.0063)
      PathPoint P6: r_ulna_radius (0.00751 -0.04839 0.02179)
    Millard2012EquilibriumMuscle BRA: max_isometric_force=987.26 optimal_fiber_length=0.0858 tendon_slack_length=0.0535
        pennation_angle_at_optimal=0
      PathPoint P1: r_humerus (0.0068 -0.1739 -0.0036)
      PathPoint P2: r_ulna_radius (-0.0032 -0.0239 0.0009)
      PathWrap: wrap_object=TRI method=hybrid
    CoordinateLimitForce r_elbow_limit: coordinate=r_elbow_flexion upper_stiffness=20 [N*m/degree]
        upper_limit=140 [degrees] lower_stiffness=20 [N*m/degree] lower_limit=10 [degrees] damping=0.25
        transition=10 [degrees]
    CoordinateLimitForce r_shoulder_limit: coordinate=r_shoulder_elev upper_stiffness=20 upper_limit=170
        lower_stiffness=20 lower_limit=-50 damping=0.25 transition=10
  MarkerSet:
    Marker r_acromion: base (-0.01256 0.04 0.17)
    Marker r_humerus_epicondyle: r_humerus (0.005 -0.2904 0.03)
    Marker r_radius_styloid: r_ulna_radius (-0.0011 -0.23559 0.0943)
    Marker r_hand_com: r_hand (-0.00301314 -0.0424993 -0.00112205)
